// COMSOL Multiphysics 6.0.0.312 model "oil_spreading_continuous_spill.mph"
// Outline of the model tree

Parameters
  time_i = 1[s]
  V_i = 2[l/min]*time_i
  R_i = 10[cm]
  h_o_i = V_i*(a+1)/(pi*a*(R_i)^2)
  g_prime = (density_w-density_o)/density_w*gravity
  density_w = 1025[kg/m^3]
  density_o = 894[kg/m^3]
  gravity = 9.81 [m/s^2]
  k = 1[kg/m^2/s]
  surface_tension = 0.0063[kg/s^2]
  a = 0.55
  c_coeff_1_i = 2*density_o*g_prime*h_o_i^2/(a*k*R_i)  // initial
  c_coeff_2_i = 2*surface_tension/(R_i*k)  // initial
  dR_dt_i = c_coeff_1_i-c_coeff_2_i  // initiallly this should be + at the beginning

Variables
  var2 "Variables 2"
    V_t = if(t<=2[min],2[l/min]*t,2[l/min]*2[min])
    h_o = V_t*(a+1)/(pi*a*R_radius^2)
    c_coeff_1 = 2*density_o*g_prime*h_o^2/(a*k*R_radius)
    c_coeff_2 = 2*surface_tension/(R_radius*k)
    h_slick = if(r>R_radius,0,V_t*(a+1)/(pi*a*R_radius^2)*(1-(r/R_radius)^2)^(1/a))

Probes
  dom2: Domain "Domain Probe 2" on all domains
    type = maximum
    probename = h_max
    expr = h
    unit = m
    descr = Dependent variable h
    axisym = 1d
    intsurface = on
    intvolume = on
    table = tbl1

Geometry
  geom2 "Geometry 2" (1D axisymmetric, length unit m)
    i1: Interval | coord = {0, 5}
    pt2: Point | p = R_i
    pt1: Point (disabled) | p = r_i
    fin: Finalize "Form Union"

Physics
  ge: GlobalEquations "Global ODEs and DAEs"
    ge1: GlobalEquations
      name = R_radius
      equation = R_radiust-c_coeff_1+c_coeff_2
      initialValueU = R_i
      valueType = complex
      DependentVariableQuantity = none
      CustomDependentVariableUnit = m
      SourceTermQuantity = none
      CustomSourceTermUnit = m/s

Mesh
  mesh2 "Mesh 2"
    size: MeshSizeDefault | hmax = 0.01; hmin = 0.0263; hauto = 2; custom = on
    edg1: Edge on remaining entities

Studies
  std5 "Study 5"
    time: Transient "Time Dependent" | tlist = range(time_i,0.1,400)

Solver configurations
  sol5 "Solution 5" (study std5)
    v1: Variables "Dependent Variables 1"
    t1: Time "Time-Dependent Solver 1" | tlist = range(time_i,0.1,400); tout = tstepsclosest; tstepsbdf = strict
      dDef: Direct
      fc1: FullyCoupled

Datasets
  dset3: Solution "Probe Solution 3" | solution = sol5
  dset6: Solution "Probe Solution 6" | solution = sol5
  max2: Maximum "Domain Probe 2" on domains 1, 2 | data = dset6
  dset8: Solution | solution = sol5

Derived values
  pev2: EvalPoint "Domain Probe 2" | data = max2; table = tbl1; expr = h; descr = Dependent variable h
  gev1: EvalGlobal "Global Evaluation 1" | data = dset8; expr = R_radius

Evaluation groups
  eg1: EvaluationGroup | data = dset8
    min1: MinLine "Line Minimum 1" on all domains | expr = d(h,r); unit = 1; includepos = on
    min2: MinLine "Line Minimum 2" on all domains | expr = if(h<=0,r,1000); unit = m; descr = Rmax
    gev1: EvalGlobal "Global Evaluation 1" | expr = h_max; unit = mm
    gev2: EvalGlobal "Global Evaluation 2" | expr = R_radius; unit = m; descr = State variable R_radius

Tables
  tbl1: Table "Probe Table 1"
    Time (s) | Dependent variable h (m), Domain Probe 2
    1 | 0.01
    1.001 | 0.01
    1.002 | 0.01
    1.004 | 0.01
    1.008 | 0.01
    1.016 | 0.01
    1.032 | 0.01
    1.064 | 0.01
    1.082 | 0.01
    1.1 | 0.01
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
Plots
  pg3: PlotGroup1D "Probe Plot Group 3"
    tblp1: Table "Probe Table Graph 1" | table = tbl1
  pg12: PlotGroup1D "1D Plot Group 12" | data = dset8
    glob1: Global | expr = R_radius
  pg13: PlotGroup1D "1D Plot Group 13" | data = dset8
    lngr1: LineGraph on domains 1, 2 | expr = h_slick; xdata = expr; xdataexpr = r